A := 1
T := 2*π
s(t) :=
    if t > 0 and t < T/2
        A
    else if t ≥ T/2 and t < T
        -A
    else
        0
M := 4
s_T(t) := sum(s(t - m*T), m = 0 .. M)
# [plot: s_T(t) vs t]
m := 2
a_m := 1/π*integral(s_T(t)*cos(m*t), t = 0 .. 2*π) = 5.55112e-17
b_m := 1/π*integral(s_T(t)*sin(m*t), t = 0 .. 2*π) = 3.7546e-17
dft(s_T(t)) =  # error: This variable is undefined. Check that the label is set correctly.
